// COMSOL Multiphysics 5.3.1.348 model "AD_device_Model_only.mph"
// Outline of the model tree

Parameters
  Ra = 0.5 [mm]  // Radius of AD cell spheroid
  W = 2 [mm]  // Radius of studied zone
  kprod = 6.7E-3 [nM/h]  // AB production rate
  kclear = kdeg_n  // AB degradation rate
  k1 = 4.2E-2 [h^-1]  // Nucleation rate constant
  k2 = 3.7E-2 [uM^-1*h^-1]  // Growth rate constant
  tdeg = 1/kclear  // Characteristic degradation time
  tpolym = kclear/(k2*kprod)  // Characteristic polymerization time
  Mf = kprod/kclear  // Final [AB]
  texp = 100*tdeg  // +10*1/(abs(kdeg-k2*Mf)) Characteristic evolution time
  Dmono = 0.583E-10 [m^2/s]  // Diffusion coefficient of monomer
  Doligo = 2^(-0.44)*Dmono  // Diffusion coefficient of oligomer
  kout = 10E-2 [h^-1]  // Cell internalisation rate
  kin = kout*140  // Cell externalisation rate
  kdeg_n = 2.11E-5 [s^-1]
  kdeg_AD = 1.47E-5[s^-1]
  L = 4 [mm]
  k1_40 = 5.19E-5 [h^-1]

Couplings
  maxop1: Maximum on domains 2

Probes
  dom1: Domain "[M]" on all domains | expr = m; unit = pM; descr = Concentration; table = tbl1
  dom2: Domain "[A]" on all domains | expr = a; unit = pM; descr = Concentration; table = tbl1
  dom17: Domain "Max [M]" on all domains | type = maximum; expr = m; unit = pM; descr = Concentration; table = tbl1
  dom16: Domain "Max [A]" on all domains | type = maximum; expr = a; unit = pM; descr = Concentration; table = tbl1
  dom15: Domain "[P]" (disabled) on all domains | expr = p; unit = pM; descr = Concentration; table = tbl1
  dom7: Domain "ISF [A]+[M]" on all domains | probename = dom3; expr = a+m; unit = pM; table = tbl1
  dom4: Domain "Autocatalytic Surface Growth" (disabled) on all domains | expr = k2*m*p; unit = pM/s; table = tbl1
  dom5: Domain "Aggregate Degredation" (disabled) on all domains | expr = kdeg*a/3; unit = pM/s; table = tbl1
  dom6: Domain "Total A Production" (disabled) on all domains
    expr = tds.R_a
    unit = mol/(m^3*s)
    descr = Total rate expression
    table = tbl1
  dom3: Domain "Nucleation rate" (disabled) on all domains | probename = dom7; expr = k1*m; unit = pM/s; table = tbl1
  dom8: Domain "Aggregate fraction" (disabled) on all domains | expr = a/(a+m); unit = 1; table = tbl1
  dom9: Domain "Theoretical M value" (disabled) on all domains
    expr = kprod/(kdeg+k1)*(1-exp(-(kdeg+k1)*t))
    unit = mol/m^3
    table = tbl1
  dom10: Domain "Theoretical A value" (disabled) on all domains | expr = 3*k1*m/kdeg; unit = mol/m^3; table = tbl1
  dom11: Domain "[M]i" (disabled) on all domains | expr = mi; unit = nM; descr = Concentration; table = tbl1
  dom12: Domain "[A]i" (disabled) on all domains | expr = ai; unit = nM; descr = Concentration; table = tbl1
  dom13: Domain "Intracellular Autocatalytic Surface Growth" (disabled) on all domains
    expr = k2*mi*ai
    unit = nM/s
    table = tbl1
  dom14: Domain "Intracellular Nucleation rate" (disabled) on all domains | expr = k1*mi; unit = nM/s; table = tbl1
  pdom1: DomainPoint "Domain Point Probe 1" | frame = material
    ppb1: PointExpr "Point Probe Expression 1" | expr = (a+m)/22.197[pM]; unit = 1; table = evl2
  pdom2: DomainPoint "Domain Point Probe 2" | frame = material; coords = {0, 1}
    ppb2: PointExpr "Point Probe Expression 2" | expr = (a+m)/17.086[pM]; unit = 1; table = evl2

Geometry
  geom1 "Geometry 1" (2D, length unit mm)
    c1: Circle "AD Cells" | r = Ra
    c2: Circle "Study Zone" (disabled) | r = 0
    r1: Rectangle | base = center; size = {W, L}
    fin: Finalize "Form Union"

Physics
  tds: DilutedSpecies "Transport of Diluted Species" on all domains
    dependent variable m = {m, a, p}
    TransportMechanism.Convection = 0
    cdm1: ConvectionDiffusionMigration "Transport Properties 1" (default) | D_m = Dmono; D_a = Doligo; D_p = 0
    nflx1: NoFlux (default)
    init1: init "Initial Values 0" (default) | initc = {0, 0, 0}
    init2: init "Initial Values with Plaques" (disabled) on all domains
      initc = {0*69.5E-9, 1000000*165.2E-9, 0*1000*165.2E-9}
    reac2: Reactions "Production" on domains 2 | R_m = kprod; R_a = 0
    reac1: Reactions "Aggregation" on domains 1, 2 | R_m = - k1*m - k2*m*a; R_a = k1*m+k2*m*a; R_p = 0
    reac5: Reactions "Aggregation with Plaques" (disabled) on domains 1, 2
      R_m = - k1*m - k2*m*p
      R_a = k1*m
      R_p = k2*m*p
    reac4: Reactions "Internalisation" (disabled) on domains 1, 2 | R_m = (-kin*m +kout*mi)*0; R_a = -kin*a + kout*ai
    reac3: Reactions "Clearance and degredation" on domains 1 | R_m = -kclear*m; R_a = - kclear*a/3

Mesh
  mesh1 "Mesh 1"
    bl1: BndLayer "Boundary Layers 1" on entire geometry
      blp: BndLayerProp "Boundary Layer Properties" on all boundaries

Studies
  std1 "Study 1"
    param4: Parametric "Parametric Sweep Diffusion" (disabled)
      pname = Dmono
      plistarr = 1E-11, 1E-10, Dmono
      punit = m^2/s
    param3: Parametric "Parametric Sweep Length" (disabled) | pname = L; plistarr = 2,10,20,L; punit = mm
    param2: Parametric "Parametric Sweep kprod" (disabled)
      pname = kprod
      plistarr = 1E-4,1E-3,1E-2,1E-1,kprod
      punit = nM/h
    param1: Parametric "Parametric Sweep k1" (disabled) | pname = k1; plistarr = 0, 1E-3, 1E-2, 1E-1, 1, k1; punit = h^-1
    param: Parametric "Parametric Sweep kclear" | pname = kclear; plistarr = 0.01,0.05,0.1,0.15,kclear; punit = h^-1
    time: Transient "Time Dependent" | tunit = d; tlist = range(0,0.1,14); rtol = 1

Solver configurations
  sol1 "Solution 1" (study std1)
    v1: Variables "Dependent Variables 1"
    t1: Time "Time-Dependent Solver 1" | tlist = range(0,0.1,14); tstepsbdf = strict; maxorder = 2
      fc1: FullyCoupled | linsolver = d1; maxiter = 8; damp = 0.9; jtech = once
      d1: Direct | linsolver = pardiso
  sol3 "Parametric Solutions 1" (study std1)
  sol7 "Parametric Solutions 2" (study std1)
  sol12 "Parametric Solutions 3" (study std1)
  sol17 "Parametric Solutions 4" (study std1)
  sol22 "Parametric Solutions 5" (study std1)
  sol28 "Parametric Solutions 6" (study std1)
  sol31 "Parametric Solutions 7" (study std1)
  sol35 "Parametric Solutions 8" (study std1)

Datasets
  dset1: Solution | solution = sol3
  dset2: Solution | solution = sol1
  dset3: Solution "Probe Solution 3" | solution = sol1
  avh1: Average "[M]" on domains 1, 2 | data = dset3
  avh2: Average "[A]" on domains 1, 2 | data = dset3
  max1: Maximum "Max [M]" on domains 1, 2 | data = dset3
  max2: Maximum "Max [A]" on domains 1, 2 | data = dset3
  avh3: Average "ISF [A]+[M]" on domains 1, 2 | data = dset3
  cpt1: CutPoint2D "Domain Point Probe 1" | data = dset3; pointx = 0; pointy = 0
  cpt2: CutPoint2D "Domain Point Probe 2" | data = dset3; pointx = 0; pointy = 1
  cln1: CutLine2D | data = dset4; genpoints = {{0, 0}, {0, L/2}}
  dset4: Solution | solution = sol7
  cln2: CutLine2D | data = dset2; genpoints = {{0, 0}, {0, L/2}}
  dset5: Solution | solution = sol12
  cln3: CutLine2D | data = dset10; genpoints = {{0, 0}, {0, L/2}}; pddir = {0, 1}
  dset6: Solution | solution = sol17
  dset7: Solution | solution = sol22
  cln4: CutLine2D | data = dset7; genpoints = {{0, 0}, {0, L/2}}
  dset8: Solution | solution = sol28
  dset9: Solution | solution = sol31
  dset10: Solution | solution = sol35

Derived values
  pev1: EvalPoint "[M]" | data = avh1; table = tbl1; expr = m
  pev2: EvalPoint "[A]" | data = avh2; table = tbl1; expr = a
  pev3: EvalPoint "Max [M]" | data = max1; table = tbl1; expr = m
  pev4: EvalPoint "Max [A]" | data = max2; table = tbl1; expr = a
  pev5: EvalPoint "ISF [A]+[M]" | data = avh3; table = tbl1; expr = a+m
  pev6: EvalPoint "Point Probe Expression 1" | data = cpt1; table = evl2; expr = (a+m)/22.197[pM]
  pev7: EvalPoint "Point Probe Expression 2" | data = cpt2; table = evl2; expr = (a+m)/17.086[pM]

Tables
  tbl1: Table "Probe Table 1"
    Time (d) | Concentration (pM), [M] | Concentration (pM), [A] | Concentration (pM), Max [M] | Concentration (pM), Max [A] | a+m (pM), ISF [A]+[M]
    0 | 0.000412935 | 8.32477e-09 | 0.00425471 | 8.57759e-08 | 0.000412943
    0.014 | 0.213711 | 0.00269677 | 1.62203 | 0.0141873 | 0.216408
    0.028 | 0.421173 | 0.00826406 | 2.68121 | 0.0366842 | 0.429437
    0.056 | 0.819831 | 0.02641 | 3.95425 | 0.0912469 | 0.846241
    0.1 | 1.37557 | 0.0822108 | 5.0182 | 0.192397 | 1.45778
    0.15 | 1.93449 | 0.17195 | 5.82669 | 0.323559 | 2.10644
    0.2 | 2.42824 | 0.284077 | 6.4569 | 0.468599 | 2.71232
    0.3 | 3.2191 | 0.569144 | 7.3817 | 0.797382 | 3.78825
    0.4 | 3.84179 | 0.900899 | 8.06779 | 1.15741 | 4.74269
    0.5 | 4.3305 | 1.26424 | 8.5898 | 1.53992 | 5.59474
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
Plots
  pg3: PlotGroup1D "Probe Plot Group 3" | data = none
    tblp1: Table "Probe Table Graph 1" | table = tbl1; xaxisdata = auto; plotcolumns = {2, 3, 4, 5, 6}
    tblp2: Table "Probe Table Graph 1.1" (disabled) | table = tbl1
    tblp3: Table "Probe Table Graph 3" | table = evl2; xaxisdata = auto; plotcolumns = {2, 3}
  pg4: PlotGroup1D "Probe Plot Group 3.1"
    tblp1: Table "Probe Table Graph 1" | table = tbl1; xaxisdata = auto; plotcolumns = 4
    tblp2: Table "Probe Table Graph 1.1" (disabled) | table = tbl1; xaxisdata = auto
    tblp3: Table "Probe Table Graph 1.1.1" (disabled) | table = tbl1
  pg17: PlotGroup1D "Baseline Points" | data = none; ylabel = Normalised AB-42 Concentration
    tblp1: Table "Table Graph 1" | table = evl2; legends = {Point A, Point B}
  pg18: PlotGroup2D "Baseline Concentration" | data = dset2
    surf1: Surface (disabled) | expr = a+m; unit = pM
    surf2: Surface | expr = (a+m); unit = pM; descr = Total AB-42 Concentration
      hght1: Height "Height Expression 1" | expr = m
    arws1: ArrowSurface (disabled)
      expr = {a*tds.grad_ax+m*tds.grad_mx, a*tds.grad_ay+m*tds.grad_my}
      arrowlength = normalized
  pg19: PlotGroup1D "Baseline" | data = cln2; xlabel = Normalised Position; ylabel = AB-42 Concentration (pM)
    lngr3: LineGraph "Monomer"
      expr = m
      unit = pM
      descr = Concentration
      xdata = expr
      xdataexpr = y/Ra
      legends = Monomer
    lngr2: LineGraph "Aggregate"
      expr = a
      unit = pM
      descr = Concentration
      xdata = expr
      xdataexpr = y/Ra
      legends = Aggregate
    lngr1: LineGraph "Total" (disabled) | expr = a+m; unit = pM; xdata = expr; xdataexpr = y/Ra; legends = Total
  pg20: PlotGroup2D "Concentration (tds) 1" | data = dset4
    surf1: Surface | expr = a+m; unit = pM
  pg21: PlotGroup2D "Concentration (tds) 2" | data = dset5
    surf1: Surface | expr = m
  pg22: PlotGroup1D "k1 Sweep" | data = cln3; xlabel = Normalised Position; ylabel = Normalised AB-42 Concentration
    lngr3: LineGraph "Monomer" (disabled)
      expr = m/dom17
      unit = mol/m^3
      xdata = expr
      xdataexpr = y/Ra
      legends = {L=2 mm, L=5 mm, L=10 mm, L=20 mm}
    lngr2: LineGraph "Aggregate" (disabled)
      expr = a/dom16
      unit = mol/m^3
      xdata = expr
      xdataexpr = y/Ra
      legends = {L=2 mm, L=5 mm, L=10 mm, L=20 mm}
    lngr1: LineGraph "Total"
      expr = (a+m)/(dom16+dom17)
      unit = mol/m^3
      xdata = expr
      xdataexpr = y/Ra
      legends = {k1=0 /h, k1=1E-3 /h, k1=1E-2 /h, k1=1E-1 /h, k1=1 /h}
    lngr4: LineGraph "Baseline Total"
      data = cln3
      expr = (a+m)/(dom16+dom17)
      unit = mol/m^3
      xdata = expr
      xdataexpr = y/Ra
      legends = k1=4.2E-2 /h
  pg28: PlotGroup1D "kprod Sweep" | data = cln3; xlabel = Normalised Position; ylabel = Normalised AB-42 Concentration
    lngr3: LineGraph "Monomer" (disabled)
      expr = m/dom17
      unit = mol/m^3
      xdata = expr
      xdataexpr = y/Ra
      legends = {L=2 mm, L=5 mm, L=10 mm, L=20 mm}
    lngr2: LineGraph "Aggregate" (disabled)
      expr = a/dom16
      unit = mol/m^3
      xdata = expr
      xdataexpr = y/Ra
      legends = {L=2 mm, L=5 mm, L=10 mm, L=20 mm}
    lngr1: LineGraph "Total"
      expr = (a+m)/(dom16+dom17)
      unit = mol/m^3
      xdata = expr
      xdataexpr = y/Ra
      legends = {kprod=1E-4 nM/h, kprod=1E-3 nM/h, kprod=1E-2 nM/h, kprod=1E-1 nM/h}
    lngr4: LineGraph "Baseline Total"
      data = cln3
      expr = (a+m)/(dom16+dom17)
      unit = mol/m^3
      xdata = expr
      xdataexpr = y/Ra
      legends = kprod=6.7E-3 nM/h
  pg29: PlotGroup1D "kclear Sweep" | data = cln3; xlabel = Normalised Position; ylabel = Normalised AB-42 Concentration
    lngr3: LineGraph "Monomer" (disabled)
      expr = m/dom17
      unit = mol/m^3
      xdata = expr
      xdataexpr = y/Ra
      legends = {L=2 mm, L=5 mm, L=10 mm, L=20 mm}
    lngr2: LineGraph "Aggregate" (disabled)
      expr = a/dom16
      unit = mol/m^3
      xdata = expr
      xdataexpr = y/Ra
      legends = {L=2 mm, L=5 mm, L=10 mm, L=20 mm}
    lngr1: LineGraph "Total"
      expr = (a+m)/(dom16+dom17)
      unit = mol/m^3
      xdata = expr
      xdataexpr = y/Ra
      legends = {kclear=0.01 /h, kclear=0.05 /h, kclear=0.10 /h, kclear=0.15 /h}
    lngr4: LineGraph "Baseline Total"
      data = cln3
      expr = (a+m)/(dom16+dom17)
      unit = mol/m^3
      xdata = expr
      xdataexpr = y/Ra
      legends = kclear=0.076 /h
  pg27: PlotGroup1D "Length sweep"
    data = cln3
    xlabel = Normalised Position
    ylabel = Normalised AB-42 Monomer Concentration
    lngr3: LineGraph "Monomer" | expr = m/dom17; unit = mol/m^3; xdata = expr; xdataexpr = 2*y/L
    lngr6: LineGraph "Baseline Monomer" | data = cln3; expr = m/dom17; unit = mol/m^3; xdata = expr; xdataexpr = 2*y/L
    lngr2: LineGraph "Aggregate" (disabled)
      expr = a/dom16
      unit = mol/m^3
      xdata = expr
      xdataexpr = 2*y/L
      legends = {L=2mm, L=10mm, L=20mm}
    lngr5: LineGraph "Baseline Aggregate" (disabled)
      data = cln3
      expr = a/dom16
      unit = mol/m^3
      xdata = expr
      xdataexpr = 2*y/L
      legends = L=4mm
    lngr1: LineGraph "Total" (disabled)
      expr = (a+m)/(dom16+dom17)
      unit = mol/m^3
      xdata = expr
      xdataexpr = 2*y/L
      legends = {L=2mm, L=5mm, L=10mm, L=20mm}
    lngr4: LineGraph "Baseline Total" (disabled)
      data = cln3
      expr = (a+m)/(dom16+dom17)
      unit = mol/m^3
      xdata = expr
      xdataexpr = 2*y/L
      legends = kprod=6.7E-3 nM/h
  pg30: PlotGroup1D "Diffusion Sweep" | data = cln3; xlabel = Normalised Position; ylabel = Normalised AB-42 Concentration
    lngr3: LineGraph "Monomer" (disabled)
      expr = m/dom17
      unit = mol/m^3
      xdata = expr
      xdataexpr = y/Ra
      legends = {L=2 mm, L=5 mm, L=10 mm, L=20 mm}
    lngr2: LineGraph "Aggregate" (disabled)
      expr = a/dom16
      unit = mol/m^3
      xdata = expr
      xdataexpr = y/Ra
      legends = {L=2 mm, L=5 mm, L=10 mm, L=20 mm}
    lngr1: LineGraph "Total"
      expr = (a+m)/(dom16+dom17)
      unit = mol/m^3
      xdata = expr
      xdataexpr = y/Ra
      legends = {kclear=0.01 /h, kclear=0.05 /h, kclear=0.10 /h, kclear=0.15 /h}
    lngr4: LineGraph "Baseline Total"
      data = cln3
      expr = (a+m)/(dom16+dom17)
      unit = mol/m^3
      xdata = expr
      xdataexpr = y/Ra
      legends = kclear=0.076 /h
  pg23: PlotGroup2D "Concentration (tds) 3" | data = dset6
    surf1: Surface | expr = m
  pg24: PlotGroup2D "Concentration (tds) 4" | data = dset7
    surf1: Surface | expr = m
  pg25: PlotGroup2D "Concentration (tds)" | data = dset8
    surf1: Surface | expr = a+m; unit = pM
  pg26: PlotGroup2D "Concentration (tds) 5" | data = dset9
    surf1: Surface | expr = m
  pg31: PlotGroup2D "Concentration (tds) 6" | data = dset10
    surf1: Surface | expr = m

Exports
  anim1: Animation
    giffilename = D:\Thomas\Documents\Travail scolaire\MIT\Research\BBB Model\β-Amyloid\COMSOL\Images\AB42 in device - 2 weeks 300DPI All frames.gif
    framesel = all
    width = 1280
  anim2: Animation
    giffilename = D:\Thomas\Documents\Travail scolaire\MIT\Research\BBB Model\β-Amyloid\COMSOL\Images\Final\AB42 in device - 2 weeks 300DPI.gif
    framesel = all
    width = 1280