// COMSOL Multiphysics 5.3.1.348 model "AD_device_spheroid_Model_only.mph"
// Outline of the model tree

Parameters
  Ra = 0.5 [mm]  // Radius of AD cell spheroid
  W = 2 [mm]  // Radius of studied zone
  kprod = 6.7E-3 [nM/h]  // AB production rate
  kclear = kdeg_n  // AB degradation rate
  k1 = 4.2E-2 [h^-1]  // Nucleation rate constant
  k2 = 3.7E-2 [uM^-1*h^-1]  // Growth rate constant
  tdeg = 1/kclear  // Characteristic degradation time
  tpolym = kclear/(k2*kprod)  // Characteristic polymerization time
  Mf = kprod/kclear  // Final [AB]
  texp = 100*tdeg  // +10*1/(abs(kdeg-k2*Mf)) Characteristic evolution time
  Dmono = 0.583E-10 [m^2/s]  // Diffusion coefficient of monomer
  Doligo = 2^(-0.44)*Dmono  // Diffusion coefficient of oligomer
  kout = 10E-2 [h^-1]  // Cell internalisation rate
  kin = kout*140  // Cell externalisation rate
  kdeg_n = 2.11E-5 [s^-1]
  kdeg_AD = 1.47E-5[s^-1]
  L = 4 [mm]
  k1_40 = 5.19E-5 [h^-1]

Couplings
  maxop1: Maximum on domains 2

Probes
  dom1: Domain "[M]" on all domains | expr = m; unit = pM; descr = Concentration
  dom2: Domain "[A]" on all domains | expr = a; unit = pM; descr = Concentration
  dom17: Domain "Max [M]" on all domains | type = maximum; expr = m; unit = pM; descr = Concentration
  dom16: Domain "Max [A]" on all domains | type = maximum; expr = a; unit = pM; descr = Concentration
  dom15: Domain "[P]" (disabled) on all domains | expr = p; unit = pM; descr = Concentration
  dom7: Domain "ISF [A]+[M]" on all domains | probename = dom3; expr = a+m; unit = pM
  dom4: Domain "Autocatalytic Surface Growth" (disabled) on all domains | expr = k2*m*p; unit = pM/s
  dom5: Domain "Aggregate Degredation" (disabled) on all domains | expr = kdeg*a/3; unit = pM/s
  dom6: Domain "Total A Production" (disabled) on all domains
    expr = tds.R_a
    unit = mol/(m^3*s)
    descr = Total rate expression
  dom3: Domain "Nucleation rate" (disabled) on all domains | probename = dom7; expr = k1*m; unit = pM/s
  dom8: Domain "Aggregate fraction" (disabled) on all domains | expr = a/(a+m); unit = 1
  dom9: Domain "Theoretical M value" (disabled) on all domains
    expr = kprod/(kdeg+k1)*(1-exp(-(kdeg+k1)*t))
    unit = mol/m^3
  dom10: Domain "Theoretical A value" (disabled) on all domains | expr = 3*k1*m/kdeg; unit = mol/m^3
  dom11: Domain "[M]i" (disabled) on all domains | expr = mi; unit = nM; descr = Concentration
  dom12: Domain "[A]i" (disabled) on all domains | expr = ai; unit = nM; descr = Concentration
  dom13: Domain "Intracellular Autocatalytic Surface Growth" (disabled) on all domains | expr = k2*mi*ai; unit = nM/s
  dom14: Domain "Intracellular Nucleation rate" (disabled) on all domains | expr = k1*mi; unit = nM/s
  pdom1: DomainPoint "Domain Point Probe 1" | frame = material
    ppb1: PointExpr "Point Probe Expression 1" | expr = (a+m)/22.197[pM]; unit = 1; table = default
  pdom2: DomainPoint "Domain Point Probe 2" | frame = material; coords = {0, 1}
    ppb2: PointExpr "Point Probe Expression 2" | expr = (a+m)/17.086[pM]; unit = 1

Geometry
  geom1 "Geometry 1" (2D, length unit mm)
    c1: Circle "AD Cells" | r = Ra
    c2: Circle "Study Zone" (disabled) | r = 0
    r1: Rectangle | base = center; size = {W, L}
    fin: Finalize "Form Union"

Physics
  tds: DilutedSpecies "Transport of Diluted Species" on all domains
    dependent variable m = {m, a, p}
    TransportMechanism.Convection = 0
    cdm1: ConvectionDiffusionMigration "Transport Properties 1" (default) | D_m = Dmono; D_a = Doligo; D_p = 0
    nflx1: NoFlux (default)
    init1: init "Initial Values 0" (default) | initc = {0, 0, 0}
    init2: init "Initial Values with Plaques" (disabled) on all domains
      initc = {0*69.5E-9, 1000000*165.2E-9, 0*1000*165.2E-9}
    reac2: Reactions "Production" on domains 2 | R_m = kprod; R_a = 0
    reac1: Reactions "Aggregation" on domains 1, 2 | R_m = - k1*m - k2*m*a; R_a = k1*m+k2*m*a; R_p = 0
    reac5: Reactions "Aggregation with Plaques" (disabled) on domains 1, 2
      R_m = - k1*m - k2*m*p
      R_a = k1*m
      R_p = k2*m*p
    reac4: Reactions "Internalisation" (disabled) on domains 1, 2 | R_m = (-kin*m +kout*mi)*0; R_a = -kin*a + kout*ai
    reac3: Reactions "Clearance and degredation" on domains 1 | R_m = -kclear*m; R_a = - kclear*a/3

Mesh
  mesh1 "Mesh 1"
    bl1: BndLayer "Boundary Layers 1" on entire geometry
      blp: BndLayerProp "Boundary Layer Properties" on all boundaries

Studies
  std1 "Study 1"
    param4: Parametric "Parametric Sweep Diffusion" (disabled)
      pname = Dmono
      plistarr = 1E-11, 1E-10, Dmono
      punit = m^2/s
    param3: Parametric "Parametric Sweep Length" (disabled) | pname = L; plistarr = 2,10,20,L; punit = mm
    param2: Parametric "Parametric Sweep kprod" (disabled)
      pname = kprod
      plistarr = 1E-4,1E-3,1E-2,1E-1,kprod
      punit = nM/h
    param1: Parametric "Parametric Sweep k1" (disabled) | pname = k1; plistarr = 0, 1E-3, 1E-2, 1E-1, 1, k1; punit = h^-1
    param: Parametric "Parametric Sweep kclear" | pname = kclear; plistarr = 0.01,0.05,0.1,0.15,kclear; punit = h^-1
    time: Transient "Time Dependent" | tunit = d; tlist = range(0,0.1,14); rtol = 1

Solver configurations
  sol1 "Solution 1" (study std1)
    v1: Variables "Dependent Variables 1"
    t1: Time "Time-Dependent Solver 1" | tlist = range(0,0.1,14); tstepsbdf = strict; maxorder = 2
      fc1: FullyCoupled | linsolver = d1; maxiter = 8; damp = 0.9; jtech = once
      d1: Direct | linsolver = pardiso